X(n) := sum(e^(-1i*2*π*n/16*k), k = 0 .. 15)
X_1(n) := e^(-1i*π*(n - n/16))*sin(π*n)/sin(π*n/16)
Y_1(n) := 1/2*X_1(n - 5) + 1/2*X_1(n + 5)
Y(n) := sum(cos(2*π*k*5/16)*e^(-1i*2*π*n/16*k), k = 0 .. 15)
Z_1(n) := 1/(2*1i)*X_1(n - 5) - 1/(2*1i)*X_1(n + 5)
Z(n) := sum(sin(2*π*k*5/16)*e^(-1i*2*π*n/16*k), k = 0 .. 15)
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