# Вычислить ДПФ прямоугольного окна длины 8 и ДПФ того же окна,но дополненного
# нулями справа до длины 16. Изобразить по модулю на одном графике:
N := 8
M := 16
k := 0 .. N - 1
w_pr[k] := 1
w_pr1[k] := 1
transpose(w_pr) = [1, 1, 1, 1, 1, 1, 1, 1]
DPF(n) := sum(w_pr[k]*e^(-1i*2*π*n/N*k), k = 0 .. N - 1)
s := N .. M - 1
w_pr1[s] := 0
transpose(w_pr1) = [1, 1, 1, 1, 1, 1, 1, 1, 0, 0, 0, 0, 0, 0, 0, 0]
DPF1(n) := sum(w_pr1[k]*e^(-1i*2*π*n/N*k), k = 0 .. M - 1)
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