ORIGIN := -9
M := 5
p := 0 .. 2*M - 1
q := 0 .. 2*M - 1
x[p] := sum(δ(p, m), m = 0 .. M - 1)
h[q] := sum(δ(q, m), m = 0 .. M - 1)
k := 0 .. 2*M - 1
y[k] := sum(x[r]*h[k - r], r = 0 .. 2*M - 1)
transpose(h) = [0, 0, 0, 0, 0, 0, 0, 0, 0, 1, 1, 1, 1, 1, 0, 0, 0, 0, 0]
transpose(x) = [0, 0, 0, 0, 0, 0, 0, 0, 0, 1, 1, 1, 1, 1, 0, 0, 0, 0, 0]
transpose(y) = [0, 0, 0, 0, 0, 0, 0, 0, 0, 1, 2, 3, 4, 5, 4, 3, 2, 1, 0]
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