τ := 0.1
δ(f) :=
    1 if f == 0
    0 otherwise
W(f) := sin(π*τ*f)/(π*f)
W_n(f) := sin(π*τ*f)/(2*π*f*(1 - τ^2*f^2))
W_n01(f) := e^(-1i*π*f*τ)*W_n(f)
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f0 := 200
X(f) := 1/2*(W(f - f0)*e^(-1i*π*τ*(f - f0)) + W(f + f0)*e^(-1i*π*τ*(f + f0))) → e^(-0.314159265359i*f - 62.8318530718i)*sin(0.314159265359*f + 62.8318530718)/(2*π*(f + 200)) + e^(62.8318530718i - 0.314159265359i*f)*sin(0.314159265359*f - 62.8318530718)/(2*π*(f - 200))
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f1 := 100
f2 := 200
X1(f) := 3/2*δ(f - f1) + 3/2*δ(f + f1) + 1/2*δ(f - f2) + 1/2*δ(f + f2)
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X1_ch(f) := 3/2*W_n(f - f1) + 3/2*W_n(f + f1) + 1/2*W_n(f - f2) + 1/2*W_n(f + f2) → 3*sin(0.314159265359*f - 31.4159265359)/(4*π*(f - 100)*(-0.01*(f - 100)^2 + 1)) + 3*sin(0.314159265359*f + 31.4159265359)/(4*π*(f + 100)*(-0.01*(f + 100)^2 + 1)) + sin(0.314159265359*f - 62.8318530718)/(4*π*(f - 200)*(-0.01*(f - 200)^2 + 1)) + sin(0.314159265359*f + 62.8318530718)/(4*π*(f + 200)*(-0.01*(f + 200)^2 + 1))
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